# 1. Binär konvertieren | 2. Exponent bestimmen: | 3. Mantisse bestimmen:
A := -0.96875  # (Höchstes Bit wegnehmen)  # (Kommastelle verschieben)
0/2 = 0
2^-1
127 - 1 = 126  # Binary: 1.1111000
0.96875*2 = 1.9375
mod(126, 2) = 0  # 4. Ergebnis:
0.938*2 = 1.876
mod(63, 2) = 1
0.876*2 = 1.752
mod(31, 2) = 1  # Vorzeichen  Eponent  Mantisse
0.752*2 = 1.504
mod(15, 2) = 1
# 1  01111110  1111000..
# 0xbf780000
0.504*2 = 1.008
mod(7, 2) = 1
0.008*2 = 0.016
mod(3, 2) = 1
0.016*2 = 0.032
mod(1, 2) = 1
0.032*2 = 0.064  # Binary: 01111110
# Binary: 11111000 | Hex: 7E
# Hex: F8
# 1. Binär konvertieren | 2. Exponent bestimmen: | 3. Mantisse bestimmen:
B := 12.75  # (Höchstes Bit wegnehmen)  # (Kommastelle verschieben)
mod(12, 2) = 0
2^3
127 + 3 = 130  # Binary: 1100.110
mod(6, 2) = 0
mod(3, 2) = 1
mod(130, 2) = 0  # Binary: 1.100110
mod(1, 2) = 1
mod(65, 2) = 1
# Binary: 1100
mod(32, 2) = 0  # 4. Ergebnis:
# Hex: C
mod(16, 2) = 0
mod(8, 2) = 0  # Vorzeichen  Eponent  Mantisse
0.75*2 = 1.5
mod(4, 2) = 0
# 0  10000010  1001100..
# 0x414c0000
0.5*2 = 1
mod(2, 2) = 0
0*2 = 0
mod(1, 2) = 1
# Binary: 110
# Hex: 6 | Binary: 10000010
# Hex: 82
# 1. Binär konvertieren | Vorzeichen  Eponent  Mantisse
# 1  10000101  1101100010...
# C:0xC2EC4000
# 2. Exponent bestimmen
1*2^0 + 0*2^1 + 1*2^2 + 0*2^3 + 0*2^4 + 0*2^5 + 0*2^6 + 1*2^7 = 133
133 - 127 = 6
# 3. Die Mantisse nach Exponentwert nach rechts verschieben
# 1.1101100010
# 1110110.0010
# Hex links Komma: 76
# Hex rechts Komma: 2
# 4. In Dezimalwert umwandeln (durch Vorzeichen Minus Zahl)
0*2^0 + 1*2^1 + 1*2^2 + 0*2^3 + 1*2^4 + 1*2^5 + 2^6 = 118
0*2^-1 + 0*2^-2 + 1*2^-3 = 0.125  # Ergebnis: -118.125
# 1. Binär konvertieren | Vorzeichen  Eponent  Mantisse
# 0  01111111  011010000...
# C:0x3FB40000
# 2. Exponent bestimmen
1*2^0 + 1*2^1 + 1*2^2 + 1*2^3 + 1*2^4 + 1*2^5 + 1*2^6 + 0*2^7 = 127
127 - 127 = 0
# 3. Die Mantisse nach Exponentwert nach rechts verschieben
# 1.011010000
# 1.011010000
# Hex links Komma: 1
# Hex rechts Komma: D
# 4. In Dezimalwert umwandeln (durch Vorzeichen Plus Zahl)
1*2^0 = 1
0*2^-1 + 1*2^-2 + 1*2^-3 + 0*2^-4 + 1*2^-5 = 0.40625  # Ergebnis: 1.406
# Vorzeichen  Eponent  Mantisse
# 1  01111110  1111000..  0xbf780000
# 0  10000010  1001100..  0x414c0000
# 1. Vorzeichen berechnen
# 3. Exponenten berechnen
# (Exponent A+B-127 (2er Komplement) + 1(Mantissa)
# 1 XOR 0 --> 1
# 01111110
# 10000010
# 10000001
# 00000001
# ------------
# 110000010
# 2. Mantisse berechnen
# Hex: 182
# 1.11110*1.10011
# 1111100
# 111110000
# 1111100
# 111110
# 11.0001011010
# 4. Ergebnis
-0.96875*12.75 = -12.3516
# Hex: C5A
# Vorzeichen  Eponent  Mantisse
# 1  10000010  10001011010..
# Hex: 0xc145a000
# Vorzeichen  Eponent  Mantisse
# 1  10000101  1101100010  0xC2EC4000
# 0  01111111  011010000...  0x3FB40000
# 10000101
# 10000001
# ------------
# 100000110
0*2^0 + 1*2^1 + 1*2^2 = 6
M1 := 1.110110001
M2 := 1.01101e-6
# Hex:106
# HexM1: 6C4000
# HexM2: 2D000
# 0.00100111100000000000000
# 1.01101e-6 (2er Komplement noch umwandeln)
# -------------------------------------
# 01.11010010111000000000000
# Der größere Exponent ist Ergebnis Exponent.
# Hex:697000
-118.125 + 1.406 = -116.719
# Vorzeichen  Eponent  Mantisse
# 1  10000101  11010010111000000100000..
# Hex: 0x42e97020
